*Heading
** Job name: Load1Ela Model name: Load1Ela
** Generated by: Abaqus/CAE 2020
*Preprint, echo=NO, model=NO, history=NO, contact=NO
**
** PARTS
**
*Part, name=PLATE
*Node
      1,           0.,   18.6132145,           0.
      2,           0.,   18.6132145,           2.
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*Element, type=C3D8
   1,  262,   33,  251, 1329,   31,    1,   32,  234
   2,  263,   34,  252, 1328,  262,   33,  251, 1329
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*Element, type=C3D6
1107, 1201, 1462, 1219,   94,  843,  176
1108,  116,  384,  152, 1201, 1462, 1219
*Elset, elset=Set-1
    1,    2,    3,    4,    5,    6
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** Section: Section-1-_PICKEDSET4
*Solid Section, elset=Set-1, material=MATERIAL-1
,
*End Part
**
**
** ASSEMBLY
**
*Assembly, name=Assembly
**
*Instance, name=PLATE-1, part=PLATE
*End Instance
**
*Nset, nset=FIXEDNODES1, instance=PLATE-1
    1,    2,    3,    4,   12,   13
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*Elset, elset=FIXEDNODES1, instance=PLATE-1
    1,    7,   13,   14,   15,   16
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*Nset, nset=FIXEDNODES2, instance=PLATE-1
    5,    6,    8,   10,   11,   14
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*Elset, elset=FIXEDNODES2, instance=PLATE-1
  222,  223,  523,  529,  535,  541
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*Nset, nset=FIXEDNODES3, instance=PLATE-1
    1,    4,    5,    8,   13,   14
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*Elset, elset=FIXEDNODES3, instance=PLATE-1
    1,    2,    3,    4,    5,    6
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*Elset, elset=__PICKEDSURF4_S3, internal, instance=PLATE-1, generate
 518,  523,    1
*Elset, elset=__PICKEDSURF4_S4, internal, instance=PLATE-1
  262,  279,  296,  313,  330,  347
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*Elset, elset=_LoadSurf1_S3, internal, instance=PLATE-1, generate
 518,  523,    1
*Elset, elset=_LoadSurf1_S4, internal, instance=PLATE-1
  262,  279,  296,  313,  330,  347
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*Surface, type=ELEMENT, name=LoadSurf1
_LoadSurf1_S3, S3
_LoadSurf1_S4, S4
*Elset, elset=_Surf-2_S3, internal, instance=PLATE-1, generate
 518,  523,    1
*Elset, elset=_Surf-2_S4, internal, instance=PLATE-1
  262,  279,  296,  313,  330,  347
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*Elset, elset=_Surf-2_S5, internal, instance=PLATE-1
 1107, 1108
*Surface, type=ELEMENT, name=Surf-2
_Surf-2_S3, S3
_Surf-2_S4, S4
_Surf-2_S5, S5
*End Assembly
**
** MATERIALS
**
*Material, name=MATERIAL-1
*Elastic
210000., 0.3
** ----------------------------------------------------------------
**
** STEP: Step-1
**
*Step, name=Step-1, nlgeom=NO
*Static
1., 1., 1e-05, 1.
**
** BOUNDARY CONDITIONS
**
** Name: Disp-BC-1 Type: Displacement/Rotation
*Boundary
FIXEDNODES1, 1, 1
** Name: Disp-BC-2 Type: Displacement/Rotation
*Boundary
FIXEDNODES2, 2, 2
** Name: Disp-BC-3 Type: Displacement/Rotation
*Boundary
FIXEDNODES3, 3, 3
**
** LOADS
**
** Name: SURFFORCE-1   Type: Pressure
*Dsload
Surf-2, P, -100.
**
** OUTPUT REQUESTS
**
*Restart, write, frequency=0
**
** FIELD OUTPUT: F-Output-2
**
*Output, field
*Element Output, directions=YES
E, NFORC, S
**
** FIELD OUTPUT: F-Output-1
**
*Node Output
U,
**
** HISTORY OUTPUT: H-Output-1
**
*Output, history, variable=PRESELECT
*End Step
